*Heading
** Job name: 15-Notch-270-New Model name: 15-Notch-270-with CZ
** Generated by: Abaqus/CAE 6.13-4
*Preprint, echo=NO, model=NO, history=NO, contact=NO
**
** PARTS
**
*Part, name=SADYKIM1
*Node
1,      0.00014933,      0.00473039
2,      0.00067164,      0.00385035
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*Element, type=CPS3
1, 5016, 5225, 5017
2, 9965, 9964, 10217
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*Element, type=COH2D4
17452, 6192, 6408, 6191, 5945
17453, 6407, 6190, 5944, 6191
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*Elset, elset=ELASTIC
44, 53, 54, 55, 56, 59
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*Elset, elset=VISCOELASTIC
1, 2, 3, 4, 5, 6
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*Elset, elset=COHESIVE_ELEMS
17452, 17453, 17455, 17456, 17457, 17459
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** Section: Section-1-ELASTIC
*Solid Section, elset=ELASTIC, controls=EC-1, material=AGG
0.05,
** Section: Section-2-VISCOELASTIC
*Solid Section, elset=VISCOELASTIC, controls=EC-1, material=MATRIX
0.05,
** Section: Section-3-COHESIVE_ELEMS
*Cohesive Section, elset=COHESIVE_ELEMS, controls=EC-1, material=COHESIVE, response=TRACTION SEPARATION, thickness=SPECIFIED
1., 0.05
*End Part
**
**
** ASSEMBLY
**
*Assembly, name=Assembly
**
*Instance, name=SADYKIM1, part=SADYKIM1
*End Instance
**
*Nset, nset=LP, instance=SADYKIM1
 11810,
*Nset, nset=RF, instance=SADYKIM1
  476, 11345
*End Assembly
**
** ELEMENT CONTROLS
**
*Section Controls, name=EC-1, ELEMENT DELETION=YES, MAX DEGRADATION=1., hourglass=STIFFNESS, VISCOSITY=0.009
1., 1., 1.
**
** MATERIALS
**
*Material, name=AGG
*Elastic
 6.35e+10, 0.15
*Material, name=COHESIVE
*Damage Initiation, criterion=MAXS
 1.08e+06, 1.08e+06, 1.08e+06
*Damage Evolution, type=ENERGY
449.,
*Elastic, type=TRACTION
 5e+12, 5e+12, 5e+12
*Material, name=MATRIX
*Elastic, moduli=INSTANTANEOUS
 2.59031e+10, 0.35
*Viscoelastic, time=PRONY
    0.432213,    0.432213,       1e-05
    0.234284,    0.234284,      0.0001
    0.202259,    0.202259,       0.001
   0.0796618,   0.0796618,        0.01
   0.0346266,   0.0346266,         0.1
  0.00948872,  0.00948872,          1.
  0.00411022,  0.00411022,         10.
  0.00124431,  0.00124431,        100.
 0.000685096, 0.000685096,       1000.
 0.000263574, 0.000263574,      10000.
 0.000335473, 0.000335473,     100000.
**
** BOUNDARY CONDITIONS
**
** Name: Disp-BC-1 Type: Displacement/Rotation
*Boundary
RF, 2, 2
** ----------------------------------------------------------------
**
** STEP: Loading
**
*Step, name=Loading, nlgeom=YES, inc=1000000000
*Visco, cetol=1.
1e-05, 30., 1e-15, 0.5
**
** BOUNDARY CONDITIONS
**
** Name: Disp-BC-2 Type: Displacement/Rotation
*Boundary
LP, 1, 1
** Name: Disp-BC-3 Type: Displacement/Rotation
*Boundary
LP, 2, 2, -0.005
**
** CONTROLS
**
*Controls, reset
*Controls, analysis=discontinuous
**
** OUTPUT REQUESTS
**
*Restart, write, number interval=1, time marks=NO
**
** FIELD OUTPUT: F-Output-1
**
*Output, field, time interval=0.5
*Element Output, directions=YES
S, STATUS
**
** FIELD OUTPUT: F-Output-2
**
*Node Output
U,
**
** HISTORY OUTPUT: H-Output-1
**
*Output, history, time interval=0.5
*Node Output, nset=RF
RF2,
*End Step
